OpenVSP model (file version 5), 18 components.
Geometry view with OpenVSP parameter names; values to 6 digits, angles in degrees, lengths in the model's unit.
Overall bounding box: X_Min=0 X_Len=33.2441 Y_Min=-29.9885 Y_Len=59.9769 Z_Min=-4.05 Z_Len=8.97822

Fuselage "Right_Fuselage"
  location (X Y Z) 0 7 0, rotation 0 0 0
  bounding box size 27 4.01459 4.05938
  Design: Length=27
  cross sections:
    n  XLocPercent  YLocPercent  ZLocPercent  shape
    0  0            0            0.0185185    point
    1  0.125        0            0.0462963    general fuselage BotStr=1.5 BotTanAngle=60 CornerRad=0 Height=3.7 LowStr=0.83 MaxWidthLoc=-0.375 TopStr=0.83 TopTanAngle=50 UpStr=0.83 Width=3.7
    2  0.25         0            0.0416667    general fuselage BotStr=1.5 BotTanAngle=60 CornerRad=0 Height=3.1 LowStr=0.83 MaxWidthLoc=-0.375 TopStr=0.83 TopTanAngle=50 UpStr=0.83 Width=3.5
    3  0.5          0            0.03         general fuselage BotStr=1.5 BotTanAngle=60 CornerRad=0 Height=2 LowStr=0.83 MaxWidthLoc=-0.25 TopStr=0.83 TopTanAngle=60 UpStr=0.83 Width=2.5
    4  0.75         0            0.03         as above
    5  1            0            0.03         as above

Propeller "Right_Prop"
  location (X Y Z) 28 7 0.75, rotation 0 0 0
  bounding box size 0.320928 6.01318 6.30909
  Design: Diameter=6.5 NumBlade=5 Beta34=20 UseBeta34Flag=1 Feather=0 Rotate=0 Precone=0 ReverseFlag=0 FoldAngle=0 PropMode=0 AF=152.158 CLi=0.540239 Chord=0.175417 Solidity=0.279184 ConstructXoC=0.5 FeatherAxisXoC=0.5 FeatherOffsetXoC=0
  cross sections:
    n  RadiusFrac  shape
    0  0.1         ellipse Ellipse_Height=0.13 Ellipse_Width=0.26
    1  0.4         NACA 16-series Chord=0.57824 IdealCl=0.7 ThickChord=0.144074
    2  1           NACA 16-series Chord=0.4225 IdealCl=0.2 ThickChord=0.03
  Chord along r/R (cubic Bezier): 0.1: 0.08, 0.266667: 0.15, 0.433333: 0.2, 0.6: 0.2, 0.716667: 0.2, 0.833333: 0.2, 0.95: 0.2, 0.966667: 0.2, 0.983333: 0.2, 1: 0.13
  Twist along r/R (PCHIP): 0.1: 46.75, 0.75: 20, 1: 13
  Thick along r/R (cubic Bezier): 0.1: 0.5, 0.166667: 0.3, 0.233333: 0.225, 0.3: 0.2, 0.4: 0.125, 0.5: 0.115, 0.6: 0.1, 0.733333: 0.075, 0.866667: 0.055, 1: 0.03
  CLI along r/R (cubic Bezier): 0.1: 0, 0.2: 0.7, 0.3: 0.7, 0.4: 0.7, 0.466667: 0.7, 0.533333: 0.7, 0.6: 0.7, 0.733333: 0.7, 0.866667: 0.7, 1: 0.2

Custom "Right_Disk", child of "Right_Prop"
  location (X Y Z) 28 7 0.75, rotation 0 0 0
  bounding box size 0 6.5 6.5
  Design: Diameter=6.5
  custom script Disk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

Custom "Right_Spinner", child of "Right_Prop"
  location (X Y Z) 28 7 0.75, rotation 0 0 0
  bounding box size 1.5 1.5 1.5
  Design: Diameter=1.5 Height=1.5
  custom script Cone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

Wing "OldTail"
  location (X Y Z) 24.5 0 4.5, rotation 0 0 0
  symmetric about XZ
  bounding box size 2.99963 16.3739 7.24119
  totals: TotalSpan=26.5 TotalProjectedSpan=16.2261 TotalChord=2.275 TotalArea=66.625 TotalAR=3.95177 RelativeTwistFlag=1
  root: chord 3, twist -1, NACA 4-series Camber=0 CamberLoc=0.2 ThickChord=0.12
  sections:
    n  Span  Root_Chord  Tip_Chord  Area    Sweep  Sweep_Location  Dihedral  Twist  Twist_Location  tip airfoil
    1  5.5   3           3          16.5    0      0               0         0      0.25            as above
    2  1     3           2.25       2.625   0      0               -30       0      0.25            as above
    3  3.75  2.25        2.25       8.4375  0      0               -75       0      0.25            as above
    4  2.5   2.25        1.75       5       14     0               -75       0      0.25            as above
    5  0.5   1.75        1.25       0.75    47     0               -75       0      0.25            as above

Fuselage "Pod"
  location (X Y Z) 13 0 -1, rotation 0 0 0
  bounding box size 7.74899 3.3 3.3
  Design: Length=5
  cross sections:
    n  XLocPercent  YLocPercent  ZLocPercent  shape
    0  0            0            0            circle Circle_Diameter=3
    1  0.5          0            0            circle Circle_Diameter=3.3
    2  1            0            0            circle Circle_Diameter=3

Fuselage "Left_Fuselage"
  location (X Y Z) 0 -7 0, rotation 0 0 0
  bounding box size 27 4.01459 4.05938
  Design: Length=27
  cross sections:
    n  XLocPercent  YLocPercent  ZLocPercent  shape
    0  0            0            0.0185185    point
    1  0.125        0            0.0462963    general fuselage BotStr=1.5 BotTanAngle=60 CornerRad=0 Height=3.7 LowStr=0.83 MaxWidthLoc=-0.375 TopStr=0.83 TopTanAngle=50 UpStr=0.83 Width=3.7
    2  0.25         0            0.0416667    general fuselage BotStr=1.5 BotTanAngle=60 CornerRad=0 Height=3.1 LowStr=0.83 MaxWidthLoc=-0.375 TopStr=0.83 TopTanAngle=50 UpStr=0.83 Width=3.5
    3  0.5          0            0.03         general fuselage BotStr=1.5 BotTanAngle=60 CornerRad=0 Height=2 LowStr=0.83 MaxWidthLoc=-0.25 TopStr=0.83 TopTanAngle=60 UpStr=0.83 Width=2.5
    4  0.75         0            0.03         as above
    5  1            0            0.03         as above

Propeller "Left_Prop"
  location (X Y Z) 28 -7 0.75, rotation 0 0 0
  bounding box size 0.320928 6.01318 6.30909
  Design: Diameter=6.5 NumBlade=5 Beta34=20 UseBeta34Flag=1 Feather=0 Rotate=0 Precone=0 ReverseFlag=0 FoldAngle=0 PropMode=0 AF=152.158 CLi=0.540239 Chord=0.175417 Solidity=0.279184 ConstructXoC=0.5 FeatherAxisXoC=0.5 FeatherOffsetXoC=0
  cross sections:
    n  RadiusFrac  shape
    0  0.1         ellipse Ellipse_Height=0.13 Ellipse_Width=0.26
    1  0.4         NACA 16-series Chord=0.57824 IdealCl=0.7 ThickChord=0.144074
    2  1           NACA 16-series Chord=0.4225 IdealCl=0.2 ThickChord=0.03
  blade curves as in "Right_Prop"

Custom "Left_Disk", child of "Left_Prop"
  location (X Y Z) 28 -7 0.75, rotation 0 0 0
  bounding box size 0 6.5 6.5
  Design: Diameter=6.5
  custom script Disk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

Custom "Left_Spinner", child of "Left_Prop"
  location (X Y Z) 28 -7 0.75, rotation 0 0 0
  bounding box size 1.5 1.5 1.5
  Design: Diameter=1.5 Height=1.5
  custom script Cone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

Wing "Wing"
  location (X Y Z) 14 0 0.65, rotation 0 0 0
  symmetric about XZ
  bounding box size 4.05189 59.9769 1.11025
  totals: TotalSpan=60 TotalProjectedSpan=59.972 TotalChord=3.475 TotalArea=190.1 TotalAR=18.9197 RelativeTwistFlag=1
  root: chord 4.05, twist 0.25, NACA 4-series Camber=0.04 CamberLoc=0.4 ThickChord=0.15
  sections:
    n  Span  Root_Chord  Tip_Chord  Area   Sweep  Sweep_Location  Dihedral  Twist  Twist_Location  tip airfoil
    1  7     4.05        4.05       28.35  0      0               0         0      0.25            as above
    2  23    4.05        1.75       66.7   2      0               2         0      0.25            NACA 4-series Camber=0.02 CamberLoc=0.2 ThickChord=0.12

Wing "NewTail"
  location (X Y Z) 30 0 4.7, rotation 0 0 0
  symmetric about XZ
  bounding box size 3.24225 14 0.426277
  totals: TotalSpan=14 TotalProjectedSpan=14 TotalChord=3.25 TotalArea=45.5 TotalAR=4.30769 RelativeTwistFlag=1
  root: chord 3.25, twist -4, NACA 4-series Camber=0 CamberLoc=0.2 ThickChord=0.12
  sections:
    n  Span  Root_Chord  Tip_Chord  Area   Sweep  Sweep_Location  Dihedral  Twist  Twist_Location  tip airfoil
    1  7     3.25        3.25       22.75  0      0               0         0      0.25            NACA 4-series Camber=0 CamberLoc=0.2 ThickChord=0.1

BodyOfRevolution "NoseWheel"
  location (X Y Z) 4 6.75 -3.3, rotation 0 0 90
  symmetric about XZ
  bounding box size 1.5 14.5 1.5
  Design: A0=0.785398 Ae=0.785398 Amin=0.19635 AminW=0.25 Angle=0 Diameter=1 Mode=0
  profile: circle Circle_Diameter=0.5

BodyOfRevolution "BORGeom"
  location (X Y Z) 16 9 -3.3, rotation 0 0 90
  symmetric about XZ
  bounding box size 1.5 19 1.5
  Design: A0=0.785398 Ae=0.785398 Amin=0.19635 AminW=0.25 Angle=0 Diameter=1 Mode=0
  profile: circle Circle_Diameter=0.5

Wing "MainStrut"
  location (X Y Z) 15.75 7 0, rotation 0 0 0
  symmetric about XZ
  bounding box size 0.5 18.4285 3.40102
  totals: TotalSpan=8 TotalProjectedSpan=4.35711 TotalChord=0.5 TotalArea=4 TotalAR=4.74611
  root: chord 0.5, twist 0, NACA 4-series Camber=0 CamberLoc=0.2 ThickChord=0.17
  sections:
    n  Span  Root_Chord  Tip_Chord  Area  Sweep  Sweep_Location  Dihedral  Twist  Twist_Location  tip airfoil
    1  4     0.5         0.5        2     0      0               -57       0      0.25            as above

Wing "NoseStrut"
  location (X Y Z) 7 7 0, rotation 0 0 0
  symmetric about XZ
  bounding box size 3.6 14.3 3.3
  totals: TotalSpan=6.6 TotalProjectedSpan=1e-06 TotalChord=0.3 TotalArea=1.98 TotalAR=0
  root: chord 0.3, twist 0, circle Circle_Diameter=0.3
  sections:
    n  Span  Root_Chord  Tip_Chord  Area  Sweep  Sweep_Location  Dihedral  Twist  Twist_Location  tip airfoil
    1  3.3   0.3         0.3        0.99  -45    0               -90       0      0.25            as above

Fuselage "NoseHub"
  location (X Y Z) 4 6.75 -3.3, rotation 0 0 90
  symmetric about XZ
  bounding box size 0.75 14.5 0.75
  Design: Length=0.5
  cross sections:
    n  XLocPercent  YLocPercent  ZLocPercent  shape
    0  0            0            0            circle Circle_Diameter=0.75
    1  1            0            0            as above

Fuselage "MainHub"
  location (X Y Z) 16 9 -3.3, rotation 0 0 90
  symmetric about XZ
  bounding box size 0.75 19 0.75
  Design: Length=0.5
  cross sections:
    n  XLocPercent  YLocPercent  ZLocPercent  shape
    0  0            0            0            circle Circle_Diameter=0.75
    1  1            0            0            as above

VSPAERO settings: Sref=56.7 bref=14 cref=4.05 Xcg=0 Ycg=0 Zcg=0 AlphaStart=0 AlphaEnd=10 AlphaNpts=1 BetaStart=0 BetaEnd=0 BetaNpts=1 MachStart=0.2 MachEnd=0 MachNpts=1 ReCref=1e+07 Vinf=100 Rho=0.002377
